i := 0 .. 4
Fmax[i] := 463831, 469487, 472884, 475234, 477014
Vvar[i] := -4, -7, -10, -13, -16
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Fr := 1/(2*pi*sqrt((Ck + Cd)*Lk))  # error: Эта переменная не определена.
# Решение относительно Cd:
(Ck*Lk - 1/(4*Fr^2*pi^2))/Lk
Lk := 10^-3
Ck := 10^-10
Fr[i] := Fmax[i]
pi := 3.14
Cd := (Ck*Lk - 1/(4*Fr^2*pi^2))/(-Lk)
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Cd[i] = [1.78586e-11; 1.50359e-11; 1.33891e-11; 1.22705e-11; 1.14342e-11]
Vvar[i] = [-4; -7; -10; -13; -16]
M := 0.33
VJ0 := 0.75
CJ0 := 10^-12
Given
[1.79*10^-11] == CJ0*(1 - (-4/VJ0))^(-M)
[1.506*10^-11] == CJ0*(1 - (-7/VJ0))^(-M)
[1.339*10^-11] == CJ0*(1 - (-10/VJ0))^(-M)
[1.232*10^-11] == CJ0*(1 - (-13/VJ0))^(-M)
Minerr(CJ0, VJ0, M) = [3.66838e-11; 0.568109; 0.344164]
