Fres := 734144
Fres_n := Fres*0.8
Fres_n := 587315
Fres := Fres_n
C1 := 47*10^-12
L2 := 1*10^-3
pi := 3.14
C2 := 20*10^-12
Given
Fres == 1/(2*pi*sqrt((C1 + C2)*L2))
Minerr(C2) = 2.65087e-11
sqrt(2) = 1.41421
