VAX := READPRN("C:\Users\valer\OneDrive\Документы\National Instruments\Circuit Design Suite 12.0\lab_03\exp3.txt")
VAX =  # no stored result
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# Вычисление параметров ВАХ Io Rb m Ft
Uk := Ik*Rb + ln((Io + Ik)/Io)*m*Ft  # error: Эта переменная не определена.
# Начальное приближение:
RbE := 0.0237*10^-3
mE := 0.33
IoE := 10^-12*5
NFtE := 0.05
Given
0.62476 == 0.000178873*RbE + ln((IoE + 0.000178873)/IoE)*mE*NFtE
0.65794 == 0.000655372*RbE + ln((IoE + 0.000655372)/IoE)*mE*NFtE
0.67237 == 0.00114246*RbE + ln((IoE + 0.00114246)/IoE)*mE*NFtE
0.6885 == 0.000178873*RbE + ln((IoE + 0.00212536)/IoE)*mE*NFtE
Diod_E := Minerr(IoE, -RbE, mE, NFtE)
Diod_E = [5.26646e-15; 0.190166; 0.410317; 0.0627911]
Udiod(Idiod) := Idiod*RbE + NFtE*ln((Idiod + IoE)/IoE)
Idiod := VAX[:, 1]
VAX[:, 0] =  # no stored result
VAX[:, 1] =  # no stored result
Idiod =  # no stored result
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