i := 0 .. 4
Fmax[i] := 421110, 461678, 467096, 470470, 472873
Vvar[i] := -1, -3.25, -5.5, -7.75, -10
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Fr := 1/(2*pi*sqrt((Ck + Cd)*Lk))  # error: Эта переменная не определена.
# Решение относительно Cd
pi := 3.14
Lk := 10^-3
Ck := 10^-10
Fr[i] := Fmax[i]
(Ck*Lk - 1/(4*Fr^2*pi^2))/Lk
Cd := (Ck*Lk - 1/(4*Fr^2*pi^2))/(-Lk)
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Cd1(U) := CJ0*(1 - U/VJ0)^(-M)  # error: Эта переменная не определена.
Cd[i] = [4.29847e-11; 1.89604e-11; 1.62167e-11; 1.45557e-11; 1.33944e-11]
Vvar[i] = [-1; -3.25; -5.5; -7.75; -10]
M := 0.33
VJ0 := 0.75
CJ0 := 10^-12*35
Given
[4.298*10^-11] == CJ0*(1 - (-1/VJ0))^(-M)
[[1.896*10^-11]] == CJ0*(1 - (-3.25/VJ0))^(-M)
[1.622*10^-11] == CJ0*(1 - (-5.5/VJ0))^(-M)
[1.456*10^-11] == CJ0*(1 - (-7.75/VJ0))^(-M)
[1.339*10^-11] == CJ0*(1 - (-10/VJ0))^(-M)
Minerr(CJ0, VJ0, M) = [3.5e-11; 0.75; 0.33]
